# OpenSim document version 20302
ControlSet Control Set:
  defaults: ControlLinear default: is_model_control=true extrapolate=true default_min=0.02 default_max=1
      filter_on=false use_steps=true kp=100 kv=20
  ControlLinear [values shared by the 21 below unless stated]: is_model_control=true extrapolate=true default_min=0.02
      default_max=1 filter_on=false use_steps=true kp=100 kv=20
  ControlLinear r_z_reserve.excitation
  ControlLinear sternoclavicular_r2_reserve.excitation
  ControlLinear sternoclavicular_r3_reserve.excitation
  ControlLinear unrotscap_r2_reserve.excitation
  ControlLinear unrotscap_r3_reserve.excitation
  ControlLinear acromioclavicular_r1_reserve.excitation
  ControlLinear acromioclavicular_r2_reserve.excitation
  ControlLinear acromioclavicular_r3_reserve.excitation
  ControlLinear unrothum_r1_reserve.excitation
  ControlLinear unrothum_r2_reserve.excitation
  ControlLinear unrothum_r3_reserve.excitation
  ControlLinear elv_angle_reserve.excitation
  ControlLinear shoulder_elv_reserve.excitation
  ControlLinear shoulder1_r2_reserve.excitation
  ControlLinear shoulder_rot_reserve.excitation
  ControlLinear elbow_flexion_reserve.excitation
  ControlLinear pro_sup_reserve.excitation
  ControlLinear deviation_reserve.excitation
  ControlLinear flexion_reserve.excitation
  ControlLinear wrist_hand_r1_reserve.excitation
  ControlLinear wrist_hand_r3_reserve.excitation
