# OpenSim document version 20302
CMC_TaskSet gait2354_CMC:
  defaults: CMC_Joint default: on=false weight=(1 1 1) wrt_body=-1 express_body=-1 active=(false false false)
      kp=(1 1 1) kv=(1 1 1) ka=(1 1 1) r0=(0 0 0) r1=(0 0 0) r2=(0 0 0) limit=0
  CMC_Joint [values shared by the 21 below unless stated]: weight=(1 1 1) wrt_body=-1 express_body=-1
      active=(true false false) kp=(100 1 1) kv=(20 1 1) ka=(1 1 1) r0=(0 0 0) r1=(0 0 0) r2=(0 0 0) limit=0
  CMC_Joint r_z: on=false coordinate=r_z
  CMC_Joint sternoclavicular_r2: coordinate=sternoclavicular_r2
  CMC_Joint sternoclavicular_r3: coordinate=sternoclavicular_r3
  CMC_Joint unrotscap_r2: coordinate=unrotscap_r2
  CMC_Joint unrotscap_r3: coordinate=unrotscap_r3
  CMC_Joint acromioclavicular_r1: coordinate=acromioclavicular_r1
  CMC_Joint acromioclavicular_r2: coordinate=acromioclavicular_r2
  CMC_Joint acromioclavicular_r3: coordinate=acromioclavicular_r3
  CMC_Joint unrothum_r1: coordinate=unrothum_r1
  CMC_Joint unrothum_r2: coordinate=unrothum_r2
  CMC_Joint unrothum_r3: coordinate=unrothum_r3
  CMC_Joint elv_angle: coordinate=elv_angle
  CMC_Joint shoulder_elv: coordinate=shoulder_elv
  CMC_Joint shoulder1_r2: coordinate=shoulder1_r2
  CMC_Joint shoulder_rot: coordinate=shoulder_rot
  CMC_Joint elbow_flexion: coordinate=elbow_flexion
  CMC_Joint pro_sup: on=false coordinate=pro_sup
  CMC_Joint deviation: on=false coordinate=deviation
  CMC_Joint flexion: coordinate=flexion
  CMC_Joint wrist_hand_r1: on=false coordinate=wrist_hand_r1
  CMC_Joint wrist_hand_r3: on=false coordinate=wrist_hand_r3
