# OpenSim document version 30000
CMCTool CMC_Reach8_controls:
  replace_force_set: false
  results_directory: Results-CMC
  output_precision: 20
  initial_time: 0.59
  final_time: 4.35
  solve_for_equilibrium_for_auxiliary_states: true
  maximum_number_of_integrator_steps: 300000000
  maximum_integrator_step_size: 1
  minimum_integrator_step_size: 0.0001
  integrator_error_tolerance: 0.0005
  desired_kinematics_file: IKreachfiltered.mot
  task_set_file: CMC_Tasks.xml
  constraints_file: CMC_ControlConstraints.xml
  lowpass_cutoff_frequency: 6
  cmc_time_window: 0.01
  use_fast_optimization_target: false
  optimizer_algorithm: ipopt
  numerical_derivative_step_size: 0.0001
  optimization_convergence_tolerance: 0.0001
  optimizer_max_iterations: 2000
  optimizer_print_level: 0
  use_verbose_printing: false
  AnalysisSet Analyses:
    Kinematics: coordinates=all start_time=0.59 end_time=4.35 step_interval=10 in_degrees=true
    Actuation: start_time=0.59 end_time=4.35 step_interval=10 in_degrees=true
