# OpenSim document version 20302
ForceSet MoBL:
  CoordinateActuator r_x: coordinate=r_x optimal_force=1
  CoordinateActuator r_y: coordinate=r_y optimal_force=1
  CoordinateActuator r_z: coordinate=r_z optimal_force=1
  CoordinateActuator t_x: coordinate=t_x optimal_force=1
  CoordinateActuator t_y: coordinate=t_y optimal_force=1
  CoordinateActuator t_z: coordinate=t_z optimal_force=1
