# OpenSim document version 40000
ForceSet MoBL_ARMS_Reserve_Actuators:
  CoordinateActuator r_z_reserve: coordinate=r_z optimal_force=100
  CoordinateActuator sternoclavicular_r2_reserve: coordinate=sternoclavicular_r2 optimal_force=100
  CoordinateActuator sternoclavicular_r3_reserve: coordinate=sternoclavicular_r3 optimal_force=100
  CoordinateActuator sternoclavicular_r3_reserve: coordinate=sternoclavicular_r3 optimal_force=100
  CoordinateActuator unrotscap_r2_reserve: coordinate=unrotscap_r2 optimal_force=100
  CoordinateActuator unrotscap_r3_reserve: coordinate=unrotscap_r3 optimal_force=100
  CoordinateActuator acromioclavicular_r1_reserve: coordinate=acromioclavicular_r1 optimal_force=100
  CoordinateActuator acromioclavicular_r2_reserve: coordinate=acromioclavicular_r2 optimal_force=100
  CoordinateActuator acromioclavicular_r3_reserve: coordinate=acromioclavicular_r3 optimal_force=100
  CoordinateActuator unrothum_r1_reserve: coordinate=unrothum_r1 optimal_force=100
  CoordinateActuator unrothum_r2_reserve: coordinate=unrothum_r2 optimal_force=100
  CoordinateActuator unrothum_r3_reserve: coordinate=unrothum_r3 optimal_force=100
  CoordinateActuator elv_angle_reserve: coordinate=elv_angle optimal_force=100
  CoordinateActuator shoulder_elv_reserve: coordinate=shoulder_elv optimal_force=100
  CoordinateActuator shoulder1_r2_reserve: coordinate=shoulder1_r2 optimal_force=100
  CoordinateActuator shoulder_rot_reserve: coordinate=shoulder_rot optimal_force=100
  CoordinateActuator elbow_flexion_reserve: coordinate=elbow_flexion optimal_force=100
  CoordinateActuator pro_sup_reserve: coordinate=pro_sup optimal_force=100
  CoordinateActuator deviation_reserve: coordinate=deviation optimal_force=100
  CoordinateActuator flexion_reserve: coordinate=flexion optimal_force=100
  CoordinateActuator wrist_hand_r1_reserve: coordinate=wrist_hand_r1 optimal_force=100
  # Actuators on the Coordinates are called Reserve actuators
  # and are used the drive the model when the model excludes its muscles (i.e. RRA)
  # or when muscles are insufficient to track desired kinematics (CMC)
