# OpenSim document version 40000
AnalyzeTool MoBL_ARMS_Upper_Limb_Model_OpenSim:
  replace_force_set: false
  force_set_files: MoBL_ARMS_Strong_actuators.xml
  results_directory: .
  output_precision: 8
  initial_time: 0
  final_time: 0.15
  solve_for_equilibrium_for_auxiliary_states: true
  maximum_number_of_integrator_steps: 20000000
  maximum_integrator_step_size: 1
  minimum_integrator_step_size: 1e-8
  integrator_error_tolerance: 1e-8
  coordinates_file: medium-hard.mot
  lowpass_cutoff_frequency_for_coordinates: 6
  AnalysisSet Analyses:
    StaticOptimization: start_time=0 end_time=0.99 step_interval=1 in_degrees=true use_model_force_set=true
        activation_exponent=2 use_muscle_physiology=true optimizer_convergence_criterion=0.000001
        optimizer_max_iterations=100000
